AVL_PYTHON_WING_TEST

#Mach
 0

#IYsym   IZsym   Zsym
 0       0       0.0

#Sref    Cref    Bref
0.0      0.0     0.0

#Xref    Yref    Zref
0.0     0.0     0.0

#--------------------------------------------------
SURFACE
Wing
!Nchordwise  Cspace  Nspanwise  Sspace
12           1.0     26         -1.1

COMPONENT
1

YDUPLICATE
0.0

ANGLE
0.0

SCALE
1.0   1.0   1.0

TRANSLATE
0.0  0.0  0.0

SECTION
#Xle    Yle    Zle     Chord   Ainc  Nspanwise  Sspace
 0.0    0.0    0.0     0.0  0.0
AFILE
/Users/vianneydubois/PycharmProjects/avl_python/resources/F15-15-mod.dat

SECTION
#Xle    Yle    Zle     Chord   Ainc  Nspanwise  Sspace
0.0   0.0   0.0      0.0    0.0
AFILE
/Users/vianneydubois/PycharmProjects/avl_python/resources/F15-15-mod.dat
CONTROL
aileron -1.0  0.0  0. 0. 0.  -1

SECTION
#Xle    Yle    Zle     Chord   Ainc  Nspanwise  Sspace
0.0    0.0    0.0     0.0    0.0
AFILE
/Users/vianneydubois/PycharmProjects/avl_python/resources/F15-11-mod.dat
CONTROL
aileron -1.0  0.0  0. 0. 0.  -1
